**Calculix input file generated by Calculix_input.py
**Created for investigation 005_Calculix_grid with mesh of 3 3 1
**element sizes are l=500 t=500 and h=700  and gaps between elements in direction xy
**gap sizes are:
**if gap direction xy then x = 10.00 and y = 10.00
**if gap direction x then x = 10.00 and y = 0
**if gap direction y then x = 0 and y = 10.00

*NODE, NSET=Nall
	1, 0.0000, 0.0000, 0.0000
	2, 500.0000, 0.0000, 0.0000
	3, 510.0000, 0.0000, 0.0000
	4, 1010.0000, 0.0000, 0.0000
	5, 1020.0000, 0.0000, 0.0000
	6, 1520.0000, 0.0000, 0.0000
	7, 0.0000, 500.0000, 0.0000
	8, 500.0000, 500.0000, 0.0000
	9, 510.0000, 500.0000, 0.0000
	10, 1010.0000, 500.0000, 0.0000
	11, 1020.0000, 500.0000, 0.0000
	12, 1520.0000, 500.0000, 0.0000
	13, 0.0000, 510.0000, 0.0000
	14, 500.0000, 510.0000, 0.0000
	15, 510.0000, 510.0000, 0.0000
	16, 1010.0000, 510.0000, 0.0000
	17, 1020.0000, 510.0000, 0.0000
	18, 1520.0000, 510.0000, 0.0000
	19, 0.0000, 1010.0000, 0.0000
	20, 500.0000, 1010.0000, 0.0000
	21, 510.0000, 1010.0000, 0.0000
	22, 1010.0000, 1010.0000, 0.0000
	23, 1020.0000, 1010.0000, 0.0000
	24, 1520.0000, 1010.0000, 0.0000
	25, 0.0000, 1020.0000, 0.0000
	26, 500.0000, 1020.0000, 0.0000
	27, 510.0000, 1020.0000, 0.0000
	28, 1010.0000, 1020.0000, 0.0000
	29, 1020.0000, 1020.0000, 0.0000
	30, 1520.0000, 1020.0000, 0.0000
	31, 0.0000, 1520.0000, 0.0000
	32, 500.0000, 1520.0000, 0.0000
	33, 510.0000, 1520.0000, 0.0000
	34, 1010.0000, 1520.0000, 0.0000
	35, 1020.0000, 1520.0000, 0.0000
	36, 1520.0000, 1520.0000, 0.0000
	37, 0.0000, 0.0000, 700.0000
	38, 500.0000, 0.0000, 700.0000
	39, 510.0000, 0.0000, 700.0000
	40, 1010.0000, 0.0000, 700.0000
	41, 1020.0000, 0.0000, 700.0000
	42, 1520.0000, 0.0000, 700.0000
	43, 0.0000, 500.0000, 700.0000
	44, 500.0000, 500.0000, 700.0000
	45, 510.0000, 500.0000, 700.0000
	46, 1010.0000, 500.0000, 700.0000
	47, 1020.0000, 500.0000, 700.0000
	48, 1520.0000, 500.0000, 700.0000
	49, 0.0000, 510.0000, 700.0000
	50, 500.0000, 510.0000, 700.0000
	51, 510.0000, 510.0000, 700.0000
	52, 1010.0000, 510.0000, 700.0000
	53, 1020.0000, 510.0000, 700.0000
	54, 1520.0000, 510.0000, 700.0000
	55, 0.0000, 1010.0000, 700.0000
	56, 500.0000, 1010.0000, 700.0000
	57, 510.0000, 1010.0000, 700.0000
	58, 1010.0000, 1010.0000, 700.0000
	59, 1020.0000, 1010.0000, 700.0000
	60, 1520.0000, 1010.0000, 700.0000
	61, 0.0000, 1020.0000, 700.0000
	62, 500.0000, 1020.0000, 700.0000
	63, 510.0000, 1020.0000, 700.0000
	64, 1010.0000, 1020.0000, 700.0000
	65, 1020.0000, 1020.0000, 700.0000
	66, 1520.0000, 1020.0000, 700.0000
	67, 0.0000, 1520.0000, 700.0000
	68, 500.0000, 1520.0000, 700.0000
	69, 510.0000, 1520.0000, 700.0000
	70, 1010.0000, 1520.0000, 700.0000
	71, 1020.0000, 1520.0000, 700.0000
	72, 1520.0000, 1520.0000, 700.0000
*ELEMENT, TYPE=C3D8, ELSET=Eall
	1, 1, 2, 8, 7, 37, 38, 44, 43
	2, 3, 4, 10, 9, 39, 40, 46, 45
	3, 5, 6, 12, 11, 41, 42, 48, 47
	4, 14, 15, 21, 20, 50, 51, 57, 56
	5, 16, 17, 23, 22, 52, 53, 59, 58
	6, 18, 19, 25, 24, 54, 55, 61, 60
	7, 27, 28, 34, 33, 63, 64, 70, 69
	8, 29, 30, 36, 35, 65, 66, 72, 71
	9, 31, 32, 38, 37, 67, 68, 74, 73

*NSET,NSET=cubes_xy_plane
1,
2,
3,
4,
5,
6,
7,
8,
9,
10,
11,
12,
13,
14,
15,
16,
17,
18,
19,
20,
21,
22,
23,
24,
25,
26,
27,
28,
29,
30,
31,
32,
33,
34,
35,
36,

*NSET,NSET=cubes_xz_plane
1,
2,
3,
4,
5,
6,
37,
38,
39,
40,
41,
42,

*NSET,NSET=cubes_yz_plane
1,
7,
13,
19,
25,
31,
37,
43,
49,
55,
61,
67,

*NSET,NSET=cubes_x_max
6,
12,
18,
24,
30,
36,
42,
48,
54,
60,
66,
72,

*NSET,NSET=cubes_y_max
31,
32,
33,
34,
35,
36,
67,
68,
69,
70,
71,
72,

*NSET,NSET=cubes_z_max
37,
38,
39,
40,
41,
42,
43,
44,
45,
46,
47,
48,
49,
50,
51,
52,
53,
54,
55,
56,
57,
58,
59,
60,
61,
62,
63,
64,
65,
66,
67,
68,
69,
70,
71,
72,

*BOUNDARY
cubes_xy_plane,3,3
cubes_xz_plane,2,2
cubes_yz_plane,1,1

*PHYSICAL CONSTANTS, ABSOLUTE ZERO=0.0000, STEFAN BOLTZMANN=5.67E-08

*INITIAL CONDITIONS, TYPE=TEMPERATURE
Nall,  0.0000

*MATERIAL,NAME=EL
*ELASTIC
210000.000,   0.3000
*DENSITY
7800.000
*CONDUCTIVITY
1000.000
*EXPANSION
2.50E-05
*SPECIFIC HEAT
5000.000

*SOLID SECTION,ELSET=Eall,MATERIAL=EL

*SURFACE,NAME=el1_x_p
1,S4
*SURFACE,NAME=el1_x_n
1,S6
*SURFACE,NAME=el1_y_p
1,S5
*SURFACE,NAME=el1_y_n
1,S3
*SURFACE,NAME=el2_x_p
2,S4
*SURFACE,NAME=el2_x_n
2,S6
*SURFACE,NAME=el2_y_p
2,S5
*SURFACE,NAME=el2_y_n
2,S3
*SURFACE,NAME=el3_x_p
3,S4
*SURFACE,NAME=el3_x_n
3,S6
*SURFACE,NAME=el3_y_p
3,S5
*SURFACE,NAME=el3_y_n
3,S3
*SURFACE,NAME=el4_x_p
4,S4
*SURFACE,NAME=el4_x_n
4,S6
*SURFACE,NAME=el4_y_p
4,S5
*SURFACE,NAME=el4_y_n
4,S3
*SURFACE,NAME=el5_x_p
5,S4
*SURFACE,NAME=el5_x_n
5,S6
*SURFACE,NAME=el5_y_p
5,S5
*SURFACE,NAME=el5_y_n
5,S3
*SURFACE,NAME=el6_x_p
6,S4
*SURFACE,NAME=el6_x_n
6,S6
*SURFACE,NAME=el6_y_p
6,S5
*SURFACE,NAME=el6_y_n
6,S3
*SURFACE,NAME=el7_x_p
7,S4
*SURFACE,NAME=el7_x_n
7,S6
*SURFACE,NAME=el7_y_p
7,S5
*SURFACE,NAME=el7_y_n
7,S3
*SURFACE,NAME=el8_x_p
8,S4
*SURFACE,NAME=el8_x_n
8,S6
*SURFACE,NAME=el8_y_p
8,S5
*SURFACE,NAME=el8_y_n
8,S3
*SURFACE,NAME=el9_x_p
9,S4
*SURFACE,NAME=el9_x_n
9,S6
*SURFACE,NAME=el9_y_p
9,S5
*SURFACE,NAME=el9_y_n
9,S3
*CONTACT PAIR,INTERACTION=SI1,TYPE=SURFACE TO SURFACE
el1_x_p,el2_x_n
*CONTACT PAIR,INTERACTION=SI1,TYPE=SURFACE TO SURFACE
el2_x_p,el3_x_n
*CONTACT PAIR,INTERACTION=SI1,TYPE=SURFACE TO SURFACE
el3_x_p,el4_x_n
*CONTACT PAIR,INTERACTION=SI1,TYPE=SURFACE TO SURFACE
el4_x_p,el5_x_n
*CONTACT PAIR,INTERACTION=SI1,TYPE=SURFACE TO SURFACE
el5_x_p,el6_x_n
*CONTACT PAIR,INTERACTION=SI1,TYPE=SURFACE TO SURFACE
el6_x_p,el7_x_n
*CONTACT PAIR,INTERACTION=SI1,TYPE=SURFACE TO SURFACE
el1_x_p,el4_x_n
*CONTACT PAIR,INTERACTION=SI1,TYPE=SURFACE TO SURFACE
el2_x_p,el5_x_n
*CONTACT PAIR,INTERACTION=SI1,TYPE=SURFACE TO SURFACE
el3_x_p,el6_x_n
*CONTACT PAIR,INTERACTION=SI1,TYPE=SURFACE TO SURFACE
el4_x_p,el7_x_n
*CONTACT PAIR,INTERACTION=SI1,TYPE=SURFACE TO SURFACE
el5_x_p,el8_x_n
*CONTACT PAIR,INTERACTION=SI1,TYPE=SURFACE TO SURFACE
el6_x_p,el9_x_n
*SURFACE INTERACTION,NAME=SI1
*SURFACE BEHAVIOR,PRESSURE-OVERCLOSURE=LINEAR
1.00E+07

*STEP, INC=10000, NLGEOM
*STATIC
0.001, 1., 0.001, 0.009
*BOUNDARY
cubes_x_max,1,1,-30

**Specify output
*NODE PRINT, NSET=Nall, FREQUENCY=1
U
*EL PRINT, ELSET=Eall, FREQUENCY=1
S,E
*NODE FILE, FREQUENCY=1
U
*EL FILE, FREQUENCY=1
S,E
*END STEP
